*Heading
** Job name: Job-1 Model name: Model-1
** Generated by: Abaqus/CAE 2021
*Preprint, echo=NO, model=NO, history=NO, contact=NO
**
** PARTS
**
*Part, name=blank
*Node
      1,           0.,          10.,           0.
      2,          10.,           0.,           0.
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*Element, type=C3D8R
  1,  596,   55,  538, 2751,   25,    1,   26,  313
  2, 2751,  538,  539, 2750,  313,   26,   27,  314
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*Nset, nset=Set-1, generate
    1,  4868,     1
*Elset, elset=Set-1, generate
    1,  3465,     1
*Orientation, name=Ori-1
1., 0., 0., 0., 1., 0.
1, 0.
** Section: Al_killed_section
*Solid Section, elset=Set-1, orientation=Ori-1, material=Al_killed_steel
,
*End Part
**
*Part, name=die
*End Part
**
*Part, name=punch
*End Part
**
**
** ASSEMBLY
**
*Assembly, name=Assembly
**
*Instance, name=blank-1, part=blank
      128.25,          16., -1.11022302462516e-16
      128.25,          16., -1.11022302462516e-16, 129.250000012688,          16., -1.11022302462516e-16, 89.9999992730282
*End Instance
**
*Instance, name=die-1, part=die
      128.25,           0.,           0.
*Node
      1,           0.,  -36.8467865, -1.80635409e-15
*Nset, nset=die-1-RefPt_, internal
1,
*Surface, type=REVOLUTION, name=m_Surf-1
START,         44.5, -36.8467875173176
 LINE,         29.5, -36.8467875173176
 LINE,         29.5, -31.8467875173176
 LINE,         24.5, -31.8467875173176
 LINE,         24.5, -13.1865334794732
 CIRCL, 25.1698729810778, -10.6865334794732,         29.5, -13.1865334794732
 LINE, 37.1132486540519,          10.
 CIRCL, 45.7735026918963,          15., 45.7735026918963,           5.
 LINE,          60.,          15.
*Rigid Body, ref node=die-1-RefPt_, analytical surface=m_Surf-1
*End Instance
**
*Instance, name=punch-1, part=punch
      128.25,    16.057663,           0.
*Node
      1,           0.,    69.942337, -1.37772768e-15
*Nset, nset=punch-1-RefPt_, internal
1,
*Surface, type=REVOLUTION, name=m_Surf-3
START,         22.5, 69.9423370361328
 LINE,         22.5, 5.94233703613281
 CIRCL,         16.5, -0.0576629638671875,         16.5, 5.94233703613281
 LINE,           0., -0.0576629638671875
*Rigid Body, ref node=punch-1-RefPt_, analytical surface=m_Surf-3
*End Instance
**
*Nset, nset=Set-1, instance=die-1
 1,
*Nset, nset=Set-2, instance=punch-1
 1,
*Nset, nset=Set-3, instance=blank-1
   1,   3,   4,   6,   9,  10
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*Elset, elset=Set-3, instance=blank-1
    1,   45,   60,   75,   90,  105
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*Nset, nset=Set-4, instance=blank-1
   2,   3,   5,   6,   7,   8
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*Elset, elset=Set-4, instance=blank-1
  30,  31,  32,  33,  34,  35
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*Elset, elset=_s_Surf-1_S4, internal, instance=blank-1
 257, 259, 261, 263, 265, 267
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*Elset, elset=_s_Surf-1_S3, internal, instance=blank-1, generate
 286,  300,    1
*Elset, elset=_s_Surf-1_S6, internal, instance=blank-1, generate
  766,  3463,     3
*Surface, type=ELEMENT, name=s_Surf-1
_s_Surf-1_S4, S4
_s_Surf-1_S3, S3
_s_Surf-1_S6, S6
*Elset, elset=_s_Surf-3_S4, internal, instance=blank-1, generate
  768,  3465,     3
*Elset, elset=_s_Surf-3_S2, internal, instance=blank-1, generate
   1,  255,    1
*Surface, type=ELEMENT, name=s_Surf-3
_s_Surf-3_S4, S4
_s_Surf-3_S2, S2
*End Assembly
**
** MATERIALS
**
*Material, name=Al_killed_steel
*Elastic
209000., 0.3
*Plastic
 131.233,    0.
 154.664, 0.002
 170.263, 0.004
 182.277, 0.006
 192.176, 0.008
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 488.424,  0.51
*Potential
1., 1.0256,  1.252, 1.0897,     1.,     1.
**
** INTERACTION PROPERTIES
**
*Surface Interaction, name=IntProp-1
1.,
*Friction, slip tolerance=0.005
 0.15,
*Surface Behavior, pressure-overclosure=HARD
**
** INTERACTIONS
**
** Interaction: blank_punch
*Contact Pair, interaction=IntProp-1, type=SURFACE TO SURFACE
s_Surf-3, punch-1.m_Surf-3
** Interaction: die_blank
*Contact Pair, interaction=IntProp-1, type=SURFACE TO SURFACE, adjust=0.0
s_Surf-1, die-1.m_Surf-1
** ----------------------------------------------------------------
**
** STEP: Step-1
**
*Step, name=Step-1, nlgeom=YES, inc=1000
*Static
0.001, 1., 1e-05, 1.
**
** BOUNDARY CONDITIONS
**
** Name: blank_xy Type: Displacement/Rotation
*Boundary
Set-4, 3, 3
** Name: blank_yz Type: Displacement/Rotation
*Boundary
Set-3, 1, 1
** Name: die Type: Symmetry/Antisymmetry/Encastre
*Boundary
Set-1, ENCASTRE
** Name: punch Type: Displacement/Rotation
*Boundary
Set-2, 1, 1
Set-2, 2, 2, -123.
Set-2, 3, 3
Set-2, 4, 4
Set-2, 5, 5
Set-2, 6, 6
**
** OUTPUT REQUESTS
**
*Restart, write, frequency=0
**
** FIELD OUTPUT: F-Output-1
**
*Output, field, variable=PRESELECT
**
** HISTORY OUTPUT: H-Output-1
**
*Output, history, variable=PRESELECT
*End Step
